// COMSOL Multiphysics 5.3.1.348 model "hel00.mph"
// Outline of the model tree

Parameters
  L = 1 [m]  // Diameter
  n = 1  // number of revolutions
  p = 0.05 [m]
  H = p*2*pi*n  // pitch
  r0 = 0.05 [m]  // inner radius
  c0 = 1  // bottom BC on externarl ramp
  c1 = 1  // top BC on externarl ramp

Variables
  var1 "Variables 1"
    K = -( p / (p^2+(x/cos(z/p))^2) )^2  // Analytic Gaussian curvature

Geometry
  geom1 "Geometry 1" (3D, length unit m)
    ps1: ParametricSurface
      rot = 180
      parname1 = u
      parmin1 = r0
      parmax1 = L/2
      parname2 = v
      parmax2 = 2*pi*n
      coord = {u*cos(v), u*sin(v), p*v}
      maxknots = 200
    fin: Finalize "Form Union"

Physics
  sr: SurfaceReactions on all boundaries
    dependent variable c
    sp1: SurfaceProperties (default) | Gamma = 1; D_c = 1
    nflx1: NoFlux (default)
    init1: init "Initial Values 1" (default) | initcs = c0
    reac1: Reactions on all boundaries | Rs_c = -2*K*c
    sc1: SurfaceConcentration on edges 1 | species = 1; cs0 = c0 + (c1-c0)*z/H

Mesh
  mesh1 "Mesh 1"
    size: MeshSizeDefault | table = cfd; hauto = 2
    dis1: Distribution on edges 2-4 | numelem = 100
    ftri1: FreeTri "Free Triangular 1" on boundaries 1

Studies
  std1 "Study 1"
    stat: Stationary

Solver configurations
  sol1 "Solution 1" (study std1)
    v1: Variables "Dependent Variables 1"
    s1: Stationary "Stationary Solver 1"
      fc1: FullyCoupled | linsolver = d1; initstep = 0.01; minstep = 1.0E-6; maxiter = 50
      d1: Direct | linsolver = pardiso

Datasets
  dset1: Solution | solution = sol1

Plots
  pg1: PlotGroup3D "Concentration (sr)" | data = dset1
    surf1: Surface | expr = c; differential = on